** written by FreeCAD inp file writer for CalculiX,Abaqus meshes
** highest dimension mesh elements only.

** Nodes
*Node, NSET=Nall
1, 6200, 36.60254037844, 136.6025403784
2, 100, 36.60254037844, 136.6025403784
3, 1320, 36.60254037844, 136.6025403784
4, 2540, 36.60254037844, 136.6025403784
5, 3760, 36.60254037844, 136.6025403784
6, 4980, 36.60254037844, 136.6025403784
7, 7420, 36.60254037844, 136.6025403784
8, 8640, 36.60254037843, 136.6025403784
9, 9860, 36.60254037843, 136.6025403784
10, 11080, 36.60254037843, 136.6025403785
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

** Volume elements
*Element, TYPE=C3D10, ELSET=Evolumes
78116, 36402, 12095, 23481, 23480, 132021, 97745, 132022, 132023, 97741, 97746
78117, 14918, 2353, 14919, 16780, 55505, 55507, 55509, 132024, 64894, 132025
78118, 35634, 23606, 36645, 36660, 132026, 132027, 132029, 132030, 132028, 132031
78119, 15000, 16514, 16579, 15001, 132032, 132033, 132035, 55942, 132034, 132036
78120, 16075, 21083, 21059, 21084, 132037, 85449, 132038, 132039, 85388, 85477
78121, 21998, 34032, 21999, 19455, 132040, 132041, 90174, 132043, 132042, 132044
78122, 31571, 31180, 31181, 31616, 131967, 129900, 131908, 132046, 132045, 132047
78123, 15547, 15546, 3562, 23597, 58662, 58777, 58774, 132049, 132048, 98355
78124, 28790, 17263, 36608, 17241, 132050, 132051, 132052, 132053, 67224, 132054
78125, 21998, 34032, 18808, 21999, 132040, 132055, 132056, 90174, 132041, 132057
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
** Define element set Eall
*ELSET, ELSET=Eall
Evolumes


***********************************************************
** Element sets for materials and FEM element type (solid, shell, beam, fluid)
*ELSET,ELSET=MaterialSolidSolid
Evolumes

***********************************************************
** constraints fixed node sets
** ConstraintFixed
*NSET,NSET=ConstraintFixed
98,
99,
100,
533,
534,
535,
657,
658,
659,
660,
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
** Physical constants for SI(mm) unit system with Kelvins
*PHYSICAL CONSTANTS, ABSOLUTE ZERO=0, STEFAN BOLTZMANN=5.670374419e-11

***********************************************************
** Materials
** see information about units at file end
** FreeCAD material name: CalculiX-Steel
** MaterialSolid
*MATERIAL, NAME=MaterialSolid
*ELASTIC
210000,0.3

***********************************************************
** Sections
*SOLID SECTION, ELSET=MaterialSolidSolid, MATERIAL=MaterialSolid

***********************************************************
** At least one step is needed to run an CalculiX analysis of FreeCAD
*STEP, INC=2000
*STATIC


***********************************************************
** Fixed Constraints
** ConstraintFixed
*BOUNDARY
ConstraintFixed,1
ConstraintFixed,2
ConstraintFixed,3


***********************************************************
** constraints force node loads
*CLOAD
** ConstraintForce
** node loads on shape: Pocket004:Face214
438,3,-0
439,3,-0
513,3,-0
514,3,-0
6674,3,-0
6707,3,-0
6708,3,-0
6709,3,-0
6710,3,-0
6711,3,-0
6712,3,-0
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
** node loads on shape: Pocket004:Face12
438,3,-0
439,3,-0
722,3,-0
724,3,-0
6725,3,-0
6726,3,-0
6727,3,-0
6728,3,-0
6729,3,-0
6730,3,-0
6731,3,-0
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

***********************************************************
** Outputs --> frd file
*NODE FILE
U
*EL FILE
S, E
** outputs --> dat file
** reaction forces for Constraint fixed
*NODE PRINT, NSET=ConstraintFixed, TOTALS=ONLY
RF

*OUTPUT, FREQUENCY=1
***********************************************************
*END STEP

***********************************************************
** CalculiX Input file
**   written by    --> FreeCAD 1.0.2
**   written on    --> Sat Oct 25 19:51:10 2025
**   file name     --> boom-lattice.FCStd
**   analysis name --> Analysis
**
**
***********************************************************
**  About units:
**  See ccx manual, ccx does not know about any unit.
**  Golden rule: The user must make sure that the numbers they provide have consistent units.
**  The user is the FreeCAD calculix writer module ;-)
**
**  The unit system which is used at Guido Dhondt's company: mm, N, s, K
**  Since Length and Mass are connected by Force, if Length is mm the Mass is in t to get N
**  The following units are used to write to inp file:
**
**  Length: mm (this includes the mesh geometry)
**  Mass: t
**  TimeSpan: s
**  Temperature: K
**
**  This leads to:
**  Force: N
**  Pressure: N/mm^2 == MPa (Young's Modulus has unit Pressure)
**  Density: t/mm^3
**  Gravity: mm/s^2
**  Thermal conductivity: t*mm/K/s^3 == as W/m/K == kW/mm/K
**  Specific Heat: mm^2/s^2/K = J/kg/K == kJ/t/K
**
